<?xml version="1.0"?>
<?xml-stylesheet type="text/xsl" href="http://jsbsim.sourceforge.net/JSBSim.xsl"?>
<fdm_config name="B-52H" version="2.0" release="ALPHA"
   xmlns:xsi="http://www.w3.org/2001/XMLSchema-instance"
   xsi:noNamespaceSchemaLocation="http://jsbsim.sourceforge.net/JSBSim.xsd">

 <fileheader>
  <author> Aeromatic v 0.96 </author>
  <filecreationdate>2019-08-10</filecreationdate>
  <version>$Revision: 1.20 $</version>
  <description> Models a B-52H. </description>
 </fileheader>

<!--
  File:     B-52H.xml
  Inputs:
    name:          B-52H
    type:          glider
    max weight:     488,000 lb
    wing span:     185 ft
    length:        159.4 ft
    wing area:     4000 sq-ft
    gear type:     tricycle
    castering:     1
    retractable?:  yes
    # engines:     8
    engine type:   turbine
    engine layout: wings
    yaw damper?    yes
  Outputs:
    wing loading:  0.12 lb/sq-ft
    payload:       264.4 lbs
    CL-alpha:      5.5 per radian
    CL-0:          0.25
    CL-max:        1.4
    CD-0:          0.01
    K:             0.023

-->

 <metrics>
   <wingarea  unit="FT2"> 4000.00 </wingarea>
   <wingspan  unit="FT" >  185.00 </wingspan>
   <wing_incidence>          2.00 </wing_incidence>
   <chord     unit="FT" >   21.62 </chord>
   <htailarea unit="FT2">  480.00 </htailarea>
   <htailarm  unit="FT" >   95.64 </htailarm>
   <vtailarea unit="FT2">  400.00 </vtailarea>
   <vtailarm  unit="FT" >   95.64 </vtailarm>
   <location name="AERORP" unit="IN">
     <x> 765.12 </x>
     <y>   0.00 </y>
     <z>   0.00 </z>
   </location>
   <location name="EYEPOINT" unit="IN">
     <x> 363.43 </x>
     <y>   0.00 </y>
     <z>   9.00 </z>
   </location>
   <location name="VRP" unit="IN">
     <x>0</x>
     <y>0</y>
     <z>0</z>
   </location>
 </metrics>

 <mass_balance>
   <ixx unit="SLUG*FT2">      5683 </ixx>
   <iyy unit="SLUG*FT2">      3974 </iyy>
   <izz unit="SLUG*FT2">      9408 </izz>
   <emptywt unit="LBS" >       185 </emptywt>
   <location name="CG" unit="IN">
     <x> 765.12 </x>
     <y>   0.00 </y>
     <z> -47.82 </z>
   </location>
   <pointmass name="Payload">
    <description> 264 LBS + full (39 LBS) fuel should bring model up to entered max weight</description>
    <weight unit="LBS">    132.2 </weight>
    <location name="POINTMASS" unit="IN">
      <x> 765.12 </x>
      <y>   0.00 </y>
      <z> -47.82 </z>
    </location>
  </pointmass>
 </mass_balance>

 <ground_reactions>

  <contact type="BOGEY" name="LEFT_MAIN">
    <location unit="IN">
      <x> 795.72 </x>
      <y> -11.10 </y>
      <z> -191.28 </z>
    </location>
    <static_friction>  0.800 </static_friction>
    <dynamic_friction> 0.500 </dynamic_friction>
    <rolling_friction> 0.500 </rolling_friction>
    <spring_coeff  unit="LBS/FT">       488.00 </spring_coeff>
    <damping_coeff unit="LBS/FT/SEC">   244.00 </damping_coeff>
    <max_steer unit="DEG">0</max_steer>
    <brake_group>NONE</brake_group>
    <retractable>1</retractable>
  </contact>

  <contact type="BOGEY" name="RIGHT_MAIN">
    <location unit="IN">
     <x> 795.72 </x>
     <y>  11.10 </y>
     <z> -191.28 </z>
   </location>
   <static_friction>  0.800 </static_friction>
   <dynamic_friction> 0.500 </dynamic_friction>
   <rolling_friction> 0.500 </rolling_friction>
   <spring_coeff unit="LBS/FT">       488.00 </spring_coeff>
   <damping_coeff unit="LBS/FT/SEC">   244.00 </damping_coeff>
   <max_steer unit="DEG">0</max_steer>
   <brake_group>NONE</brake_group>
   <retractable>1</retractable>
  </contact>

  <contact type="BOGEY" name="NOSE">
    <location unit="IN">
     <x> 248.66 </x>
     <y>   0.00 </y>
     <z> -114.77 </z>
   </location>
   <static_friction>  0.800 </static_friction>
   <dynamic_friction> 0.500 </dynamic_friction>
   <rolling_friction> 0.500 </rolling_friction>
   <spring_coeff unit="LBS/FT">        146.40 </spring_coeff>
   <damping_coeff unit="LBS/FT/SEC">    73.20 </damping_coeff>
   <max_steer unit="DEG">0</max_steer>
   <brake_group>NONE</brake_group>
   <retractable>1</retractable>
  </contact>

  <contact type="STRUCTURE" name="LEFT_WING">
    <location unit="IN">
     <x> 765.12 </x>
     <y> -1110.00 </y>
     <z> -47.82 </z>
   </location>
   <static_friction>  1.00 </static_friction>
   <dynamic_friction> 1.00 </dynamic_friction>
   <spring_coeff unit="LBS/FT">        488.00 </spring_coeff>
   <damping_coeff unit="LBS/FT/SEC">   488.00 </damping_coeff>
  </contact>

  <contact type="STRUCTURE" name="RIGHT_WING">
    <location unit="IN">
     <x> 765.12 </x>
     <y> 1110.00 </y>
     <z> -47.82 </z>
   </location>
   <static_friction>  1.00 </static_friction>
   <dynamic_friction> 1.00 </dynamic_friction>
   <spring_coeff unit="LBS/FT">        488.00 </spring_coeff>
   <damping_coeff unit="LBS/FT/SEC">   488.00 </damping_coeff>
  </contact>

 </ground_reactions>

 <propulsion>

   <engine file="TF33-P-3.xml">
    <location unit="IN">
      <x> 765.12 </x>
      <y> -370.00 </y>
      <z> -40.00 </z>
    </location>
    <orient unit="DEG">
      <pitch> 0.00 </pitch>
      <roll>  0.00 </roll>
      <yaw>   0.00 </yaw>
    </orient>
    <feed>0</feed>
    <thruster file="direct">
     <location unit="IN">
       <x> 765.12 </x>
       <y> -370.00 </y>
       <z> -40.00 </z>
     </location>
     <orient unit="DEG">
       <pitch> 0.00 </pitch>
       <roll>  0.00 </roll>
       <yaw>   0.00 </yaw>
     </orient>
    </thruster>
  </engine>

   <engine file="TF33-P-3.xml">
    <location unit="IN">
      <x> 765.12 </x>
      <y> -370.00 </y>
      <z> -40.00 </z>
    </location>
    <orient unit="DEG">
      <pitch> 0.00 </pitch>
      <roll>  0.00 </roll>
      <yaw>   0.00 </yaw>
    </orient>
    <feed>1</feed>
    <thruster file="direct">
     <location unit="IN">
       <x> 765.12 </x>
       <y> -370.00 </y>
       <z> -40.00 </z>
     </location>
     <orient unit="DEG">
       <pitch> 0.00 </pitch>
       <roll>  0.00 </roll>
       <yaw>   0.00 </yaw>
     </orient>
    </thruster>
  </engine>

   <engine file="TF33-P-3.xml">
    <location unit="IN">
      <x> 765.12 </x>
      <y> -370.00 </y>
      <z> -40.00 </z>
    </location>
    <orient unit="DEG">
      <pitch> 0.00 </pitch>
      <roll>  0.00 </roll>
      <yaw>   0.00 </yaw>
    </orient>
    <feed>2</feed>
    <thruster file="direct">
     <location unit="IN">
       <x> 765.12 </x>
       <y> -370.00 </y>
       <z> -40.00 </z>
     </location>
     <orient unit="DEG">
       <pitch> 0.00 </pitch>
       <roll>  0.00 </roll>
       <yaw>   0.00 </yaw>
     </orient>
    </thruster>
  </engine>

   <engine file="TF33-P-3.xml">
    <location unit="IN">
      <x> 765.12 </x>
      <y> -370.00 </y>
      <z> -40.00 </z>
    </location>
    <orient unit="DEG">
      <pitch> 0.00 </pitch>
      <roll>  0.00 </roll>
      <yaw>   0.00 </yaw>
    </orient>
    <feed>3</feed>
    <thruster file="direct">
     <location unit="IN">
       <x> 765.12 </x>
       <y> -370.00 </y>
       <z> -40.00 </z>
     </location>
     <orient unit="DEG">
       <pitch> 0.00 </pitch>
       <roll>  0.00 </roll>
       <yaw>   0.00 </yaw>
     </orient>
    </thruster>
  </engine>

   <engine file="TF33-P-3.xml">
    <location unit="IN">
      <x> 765.12 </x>
      <y> 370.00 </y>
      <z> -40.00 </z>
    </location>
    <orient unit="DEG">
      <pitch> 0.00 </pitch>
      <roll>  0.00 </roll>
      <yaw>   0.00 </yaw>
    </orient>
    <feed>4</feed>
    <thruster file="direct">
     <location unit="IN">
       <x> 765.12 </x>
       <y> 370.00 </y>
       <z> -40.00 </z>
     </location>
     <orient unit="DEG">
       <pitch> 0.00 </pitch>
       <roll>  0.00 </roll>
       <yaw>   0.00 </yaw>
     </orient>
    </thruster>
  </engine>

   <engine file="TF33-P-3.xml">
    <location unit="IN">
      <x> 765.12 </x>
      <y> 370.00 </y>
      <z> -40.00 </z>
    </location>
    <orient unit="DEG">
      <pitch> 0.00 </pitch>
      <roll>  0.00 </roll>
      <yaw>   0.00 </yaw>
    </orient>
    <feed>5</feed>
    <thruster file="direct">
     <location unit="IN">
       <x> 765.12 </x>
       <y> 370.00 </y>
       <z> -40.00 </z>
     </location>
     <orient unit="DEG">
       <pitch> 0.00 </pitch>
       <roll>  0.00 </roll>
       <yaw>   0.00 </yaw>
     </orient>
    </thruster>
  </engine>

   <engine file="TF33-P-3.xml">
    <location unit="IN">
      <x> 765.12 </x>
      <y> 370.00 </y>
      <z> -40.00 </z>
    </location>
    <orient unit="DEG">
      <pitch> 0.00 </pitch>
      <roll>  0.00 </roll>
      <yaw>   0.00 </yaw>
    </orient>
    <feed>6</feed>
    <thruster file="direct">
     <location unit="IN">
       <x> 765.12 </x>
       <y> 370.00 </y>
       <z> -40.00 </z>
     </location>
     <orient unit="DEG">
       <pitch> 0.00 </pitch>
       <roll>  0.00 </roll>
       <yaw>   0.00 </yaw>
     </orient>
    </thruster>
  </engine>

   <engine file="TF33-P-3.xml">
    <location unit="IN">
      <x> 765.12 </x>
      <y> 370.00 </y>
      <z> -40.00 </z>
    </location>
    <orient unit="DEG">
      <pitch> 0.00 </pitch>
      <roll>  0.00 </roll>
      <yaw>   0.00 </yaw>
    </orient>
    <feed>7</feed>
    <thruster file="direct">
     <location unit="IN">
       <x> 765.12 </x>
       <y> 370.00 </y>
       <z> -40.00 </z>
     </location>
     <orient unit="DEG">
       <pitch> 0.00 </pitch>
       <roll>  0.00 </roll>
       <yaw>   0.00 </yaw>
     </orient>
    </thruster>
  </engine>

  <tank type="FUEL" number="0">
     <location unit="IN">
       <x> 765.12 </x>
       <y>   0.00 </y>
       <z> -47.82 </z>
     </location>
     <capacity unit="LBS">   4.28 </capacity>
     <contents unit="LBS">   2.14 </contents>
  </tank>

  <tank type="FUEL" number="1">
     <location unit="IN">
       <x> 765.12 </x>
       <y>   0.00 </y>
       <z> -47.82 </z>
     </location>
     <capacity unit="LBS">   4.28 </capacity>
     <contents unit="LBS">   2.14 </contents>
  </tank>

  <tank type="FUEL" number="2">
     <location unit="IN">
       <x> 765.12 </x>
       <y>   0.00 </y>
       <z> -47.82 </z>
     </location>
     <capacity unit="LBS">   4.28 </capacity>
     <contents unit="LBS">   2.14 </contents>
  </tank>

  <tank type="FUEL" number="3">
     <location unit="IN">
       <x> 765.12 </x>
       <y>   0.00 </y>
       <z> -47.82 </z>
     </location>
     <capacity unit="LBS">   4.28 </capacity>
     <contents unit="LBS">   2.14 </contents>
  </tank>

  <tank type="FUEL" number="4">
     <location unit="IN">
       <x> 765.12 </x>
       <y>   0.00 </y>
       <z> -47.82 </z>
     </location>
     <capacity unit="LBS">   4.28 </capacity>
     <contents unit="LBS">   2.14 </contents>
  </tank>

  <tank type="FUEL" number="5">
     <location unit="IN">
       <x> 765.12 </x>
       <y>   0.00 </y>
       <z> -47.82 </z>
     </location>
     <capacity unit="LBS">   4.28 </capacity>
     <contents unit="LBS">   2.14 </contents>
  </tank>

  <tank type="FUEL" number="6">
     <location unit="IN">
       <x> 765.12 </x>
       <y>   0.00 </y>
       <z> -47.82 </z>
     </location>
     <capacity unit="LBS">   4.28 </capacity>
     <contents unit="LBS">   2.14 </contents>
  </tank>

  <tank type="FUEL" number="7">
     <location unit="IN">
       <x> 765.12 </x>
       <y>   0.00 </y>
       <z> -47.82 </z>
     </location>
     <capacity unit="LBS">   4.28 </capacity>
     <contents unit="LBS">   2.14 </contents>
  </tank>

  <tank type="FUEL" number="8">
     <location unit="IN">
       <x> 765.12 </x>
       <y>   0.00 </y>
       <z> -47.82 </z>
     </location>
     <capacity unit="LBS">   4.28 </capacity>
     <contents unit="LBS">   2.14 </contents>
  </tank>

 </propulsion>

 <flight_control name="FCS: B-52H">

  <channel name="Pitch">

   <summer name="Pitch Trim Sum">
      <input>fcs/elevator-cmd-norm</input>
      <input>fcs/pitch-trim-cmd-norm</input>
      <clipto>
        <min> -1 </min>
        <max>  1 </max>
      </clipto>
   </summer>

   <aerosurface_scale name="Elevator Control">
      <input>fcs/pitch-trim-sum</input>
      <range>
        <min> -0.35 </min>
        <max>  0.35 </max>
      </range>
      <output>fcs/elevator-pos-rad</output>
   </aerosurface_scale>

   <aerosurface_scale name="elevator normalization">
      <input>fcs/elevator-pos-rad</input>
      <domain>
        <min> -0.35 </min>
        <max>  0.35 </max>
      </domain>
      <range>
        <min> -1 </min>
        <max>  1 </max>
      </range>
      <output>fcs/elevator-pos-norm</output>
   </aerosurface_scale>

  </channel>

  <channel name="Roll">

   <summer name="Roll Trim Sum">
      <input>fcs/aileron-cmd-norm</input>
      <input>fcs/roll-trim-cmd-norm</input>
      <clipto>
        <min> -1 </min>
        <max>  1 </max>
      </clipto>
   </summer>

   <aerosurface_scale name="Left Aileron Control">
      <input>fcs/roll-trim-sum</input>
      <range>
        <min> -0.35 </min>
        <max>  0.35 </max>
      </range>
      <output>fcs/left-aileron-pos-rad</output>
   </aerosurface_scale>

   <aerosurface_scale name="Right Aileron Control">
      <input>fcs/roll-trim-sum</input>
      <range>
        <min> -0.35 </min>
        <max>  0.35 </max>
      </range>
      <output>fcs/right-aileron-pos-rad</output>
   </aerosurface_scale>

   <aerosurface_scale name="left aileron normalization">
      <input>fcs/left-aileron-pos-rad</input>
      <domain>
        <min> -0.35 </min>
        <max>  0.35 </max>
      </domain>
      <range>
        <min> -1 </min>
        <max>  1 </max>
      </range>
      <output>fcs/left-aileron-pos-norm</output>
   </aerosurface_scale>

   <aerosurface_scale name="right aileron normalization">
      <input>fcs/right-aileron-pos-rad</input>
      <domain>
        <min> -0.35 </min>
        <max>  0.35 </max>
      </domain>
      <range>
        <min> -1 </min>
        <max>  1 </max>
      </range>
      <output>fcs/right-aileron-pos-norm</output>
   </aerosurface_scale>

  </channel>

  <property value="1">fcs/yaw-damper-enable</property>
  <channel name="Yaw">

   <summer name="Rudder Command Sum">
      <input>fcs/rudder-cmd-norm</input>
      <input>fcs/yaw-trim-cmd-norm</input>
      <clipto>
        <min> -1 </min>
        <max>  1 </max>
      </clipto>
   </summer>

   <scheduled_gain name="Yaw Damper Rate">
      <input>velocities/r-aero-rad_sec</input>
      <table>
        <independentVar lookup="row">velocities/ve-kts</independentVar>
         <tableData>
            30     0.00
            60     2.00
         </tableData>
      </table>
      <gain>fcs/yaw-damper-enable</gain>
   </scheduled_gain>

   <summer name="Rudder Sum">
      <input>fcs/rudder-command-sum</input>
      <input>fcs/yaw-damper-rate</input>
      <clipto>
        <min> -1.1 </min>
        <max>  1.1 </max>
      </clipto>
   </summer>

   <aerosurface_scale name="Rudder Control">
      <input>fcs/rudder-sum</input>
      <domain>
        <min> -1.1 </min>
        <max>  1.1 </max>
      </domain>
      <range>
        <min> -0.35 </min>
        <max>  0.35 </max>
      </range>
      <output>fcs/rudder-pos-rad</output>
   </aerosurface_scale>

   <aerosurface_scale name="rudder normalization">
      <input>fcs/rudder-pos-rad</input>
      <domain>
        <min> -0.35 </min>
        <max>  0.35 </max>
      </domain>
      <range>
        <min> -1 </min>
        <max>  1 </max>
      </range>
      <output>fcs/rudder-pos-norm</output>
   </aerosurface_scale>

  </channel>

  <channel name="Flaps">
   <kinematic name="Flaps Control">
     <input>fcs/flap-cmd-norm</input>
     <traverse>
       <setting>
          <position>  0 </position>
          <time>      0 </time>
       </setting>
       <setting>
          <position> 15 </position>
          <time>      4 </time>
       </setting>
       <setting>
          <position> 30 </position>
          <time>      3 </time>
       </setting>
     </traverse>
     <output>fcs/flap-pos-deg</output>
   </kinematic>

   <aerosurface_scale name="flap normalization">
      <input>fcs/flap-pos-deg</input>
      <domain>
        <min>  0 </min>
        <max> 30 </max>
      </domain>
      <range>
        <min> 0 </min>
        <max> 1 </max>
      </range>
      <output>fcs/flap-pos-norm</output>
   </aerosurface_scale>

  </channel>

  <channel name="Landing Gear">
   <kinematic name="Gear Control">
     <input>gear/gear-cmd-norm</input>
     <traverse>
       <setting>
          <position> 0 </position>
          <time>     0 </time>
       </setting>
       <setting>
          <position> 1 </position>
          <time>     5 </time>
       </setting>
     </traverse>
     <output>gear/gear-pos-norm</output>
   </kinematic>

  </channel>

  <channel name="Speedbrake">
   <kinematic name="Speedbrake Control">
     <input>fcs/speedbrake-cmd-norm</input>
     <traverse>
       <setting>
          <position> 0 </position>
          <time>     0 </time>
       </setting>
       <setting>
          <position> 1 </position>
          <time>     1 </time>
       </setting>
     </traverse>
     <output>fcs/speedbrake-pos-norm</output>
   </kinematic>

  </channel>

 </flight_control>

 <aerodynamics>

  <axis name="LIFT">

    <function name="aero/force/Lift_alpha">
      <description>Lift due to alpha</description>
      <product>
          <property>aero/qbar-psf</property>
          <property>metrics/Sw-sqft</property>
          <table>
            <independentVar lookup="row">aero/alpha-rad</independentVar>
            <tableData>
              -0.20 -0.850
               0.00  0.250
               0.21  1.400
               0.60  0.710
            </tableData>
          </table>
      </product>
    </function>

    <function name="aero/force/Lift_flap">
       <description>Delta Lift due to flaps</description>
       <product>
           <property>aero/qbar-psf</property>
           <property>metrics/Sw-sqft</property>
           <property>fcs/flap-pos-deg</property>
           <value> 0.00667 </value>
       </product>
    </function>

    <function name="aero/force/Lift_speedbrake">
       <description>Delta Lift due to speedbrake</description>
       <product>
           <property>aero/qbar-psf</property>
           <property>metrics/Sw-sqft</property>
           <property>fcs/speedbrake-pos-norm</property>
           <value>-0.05</value>
       </product>
    </function>

    <function name="aero/force/Lift_elevator">
       <description>Lift due to Elevator Deflection</description>
       <product>
           <property>aero/qbar-psf</property>
           <property>metrics/Sw-sqft</property>
           <property>fcs/elevator-pos-rad</property>
           <value>0.2</value>
       </product>
    </function>

  </axis>

  <axis name="DRAG">

    <function name="aero/force/Drag_basic">
       <description>Drag at zero lift</description>
       <product>
          <property>aero/qbar-psf</property>
          <property>metrics/Sw-sqft</property>
          <table>
            <independentVar lookup="row">aero/alpha-rad</independentVar>
            <tableData>
             -1.57    1.500
             -0.26    0.013
              0.00    0.010
              0.26    0.013
              1.57    1.500
            </tableData>
          </table>
       </product>
    </function>

    <function name="aero/force/Drag_induced">
       <description>Induced drag</description>
         <product>
           <property>aero/qbar-psf</property>
           <property>metrics/Sw-sqft</property>
           <property>aero/cl-squared</property>
           <value>0.023</value>
         </product>
    </function>

    <function name="aero/force/Drag_mach">
       <description>Drag due to mach</description>
        <product>
          <property>aero/qbar-psf</property>
          <property>metrics/Sw-sqft</property>
          <table>
            <independentVar lookup="row">velocities/mach</independentVar>
            <tableData>
                0.00      0.000
                0.7      0.000
                1.10      0.023
                1.80      0.015
            </tableData>
          </table>
        </product>
    </function>

    <function name="aero/force/Drag_flap">
       <description>Drag due to flaps</description>
         <product>
           <property>aero/qbar-psf</property>
           <property>metrics/Sw-sqft</property>
           <property>fcs/flap-pos-deg</property>
           <value> 0.00080 </value>
         </product>
    </function>

    <function name="aero/force/Drag_gear">
       <description>Drag due to gear</description>
         <product>
           <property>aero/qbar-psf</property>
           <property>metrics/Sw-sqft</property>
           <property>gear/gear-pos-norm</property>
           <value>0.012</value>
         </product>
    </function>

    <function name="aero/force/Drag_speedbrake">
       <description>Drag due to speedbrakes</description>
         <product>
           <property>aero/qbar-psf</property>
           <property>metrics/Sw-sqft</property>
           <property>fcs/speedbrake-pos-norm</property>
           <value>0.01</value>
         </product>
    </function>

    <function name="aero/force/Drag_beta">
       <description>Drag due to sideslip</description>
       <product>
          <property>aero/qbar-psf</property>
          <property>metrics/Sw-sqft</property>
          <table>
            <independentVar lookup="row">aero/beta-rad</independentVar>
            <tableData>
              -1.57    1.230
              -0.26    0.050
               0.00    0.000
               0.26    0.050
               1.57    1.230
            </tableData>
          </table>
       </product>
    </function>

    <function name="aero/force/Drag_elevator">
       <description>Drag due to Elevator Deflection</description>
       <product>
           <property>aero/qbar-psf</property>
           <property>metrics/Sw-sqft</property>
           <abs><property>fcs/elevator-pos-norm</property></abs>
           <value>0.04</value>
       </product>
    </function>

  </axis>

  <axis name="SIDE">

    <function name="aero/force/Side_beta">
       <description>Side force due to beta</description>
       <product>
           <property>aero/qbar-psf</property>
           <property>metrics/Sw-sqft</property>
           <property>aero/beta-rad</property>
           <value>-1</value>
       </product>
    </function>

  </axis>

  <axis name="ROLL">

    <function name="aero/moment/Roll_beta">
       <description>Roll moment due to beta</description>
       <product>
           <property>aero/qbar-psf</property>
           <property>metrics/Sw-sqft</property>
           <property>metrics/bw-ft</property>
           <property>aero/beta-rad</property>
           <value>-0.1</value>
       </product>
    </function>

    <function name="aero/moment/Roll_damp">
       <description>Roll moment due to roll rate</description>
       <product>
           <property>aero/qbar-psf</property>
           <property>metrics/Sw-sqft</property>
           <property>metrics/bw-ft</property>
           <property>aero/bi2vel</property>
           <property>velocities/p-aero-rad_sec</property>
           <value>-0.4</value>
       </product>
    </function>

    <function name="aero/moment/Roll_yaw">
       <description>Roll moment due to yaw rate</description>
       <product>
           <property>aero/qbar-psf</property>
           <property>metrics/Sw-sqft</property>
           <property>metrics/bw-ft</property>
           <property>aero/bi2vel</property>
           <property>velocities/r-aero-rad_sec</property>
           <value>0.15</value>
       </product>
    </function>

    <function name="aero/moment/Roll_aileron">
       <description>Roll moment due to aileron</description>
       <product>
          <property>aero/qbar-psf</property>
          <property>metrics/Sw-sqft</property>
          <property>metrics/bw-ft</property>
          <property>fcs/left-aileron-pos-rad</property>
          <value>0.06</value>
       </product>
    </function>

    <function name="aero/moment/Roll_rudder">
       <description>Roll moment due to rudder</description>
       <product>
           <property>aero/qbar-psf</property>
           <property>metrics/Sw-sqft</property>
           <property>metrics/bw-ft</property>
           <property>fcs/rudder-pos-rad</property>
           <value>0.01</value>
       </product>
    </function>

  </axis>

  <axis name="PITCH">

    <function name="aero/moment/Pitch_alpha">
       <description>Pitch moment due to alpha</description>
       <product>
           <property>aero/qbar-psf</property>
           <property>metrics/Sw-sqft</property>
           <property>metrics/cbarw-ft</property>
           <property>aero/alpha-rad</property>
           <value>-0.5</value>
       </product>
    </function>

    <function name="aero/moment/Pitch_elevator">
       <description>Pitch moment due to elevator</description>
       <product>
          <property>aero/qbar-psf</property>
          <property>metrics/Sw-sqft</property>
          <property>metrics/cbarw-ft</property>
          <property>fcs/elevator-pos-rad</property>
          <table>
            <independentVar lookup="row">velocities/mach</independentVar>
            <tableData>
              0.0     -0.800
              2.0     -0.200
            </tableData>
          </table>
       </product>
    </function>

    <function name="aero/moment/Pitch_damp">
       <description>Pitch moment due to pitch rate</description>
       <product>
           <property>aero/qbar-psf</property>
           <property>metrics/Sw-sqft</property>
           <property>metrics/cbarw-ft</property>
           <property>aero/ci2vel</property>
           <property>velocities/q-aero-rad_sec</property>
           <value>-9</value>
       </product>
    </function>

    <function name="aero/moment/Pitch_alphadot">
       <description>Pitch moment due to alpha rate</description>
       <product>
           <property>aero/qbar-psf</property>
           <property>metrics/Sw-sqft</property>
           <property>metrics/cbarw-ft</property>
           <property>aero/ci2vel</property>
           <property>aero/alphadot-rad_sec</property>
           <value>-12</value>
       </product>
    </function>

  </axis>

  <axis name="YAW">

    <function name="aero/moment/Yaw_beta">
       <description>Yaw moment due to beta</description>
       <product>
           <property>aero/qbar-psf</property>
           <property>metrics/Sw-sqft</property>
           <property>metrics/bw-ft</property>
           <property>aero/beta-rad</property>
           <value>0.12</value>
       </product>
    </function>

    <function name="aero/moment/Yaw_damp">
       <description>Yaw moment due to yaw rate</description>
       <product>
           <property>aero/qbar-psf</property>
           <property>metrics/Sw-sqft</property>
           <property>metrics/bw-ft</property>
           <property>aero/bi2vel</property>
           <property>velocities/r-aero-rad_sec</property>
           <value>-0.15</value>
       </product>
    </function>

    <function name="aero/moment/Yaw_rudder">
       <description>Yaw moment due to rudder</description>
       <product>
           <property>aero/qbar-psf</property>
           <property>metrics/Sw-sqft</property>
           <property>metrics/bw-ft</property>
           <property>fcs/rudder-pos-rad</property>
           <value>-0.03</value>
       </product>
    </function>

    <function name="aero/moment/Yaw_aileron">
       <description>Adverse yaw</description>
       <product>
           <property>aero/qbar-psf</property>
           <property>metrics/Sw-sqft</property>
           <property>metrics/bw-ft</property>
           <property>fcs/left-aileron-pos-rad</property>
           <value>-0.02</value>
       </product>
    </function>

  </axis>

 </aerodynamics>

 <external_reactions>
 </external_reactions>

</fdm_config>
